Pk == 1 + R_4/R_5
Ik == -Z_C1/Z_R11 == -(1/C_1*1/R_11) == -1/(R_11*C_1)
Dk == -Z_R2/Z_C3 == -(R_2/(1/C_3)) == -(R_2/(1/C_3)*C_3/C_3) == -R_2*C_3/(C_3/C_3) == -R_2*C_3
Pk == 1 + R_4/R_5
Ik == -1/(R_11*C_1)
Dk == -R_2*C_3
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Pk := 10
R_4 := 10 kΩ
Pk == 1 + R_4/R_5 solve, R_5 → 10*kΩ/9 = 1.11111 kΩ
Ik := 0.018
C_1 := 68*10^-6
Ik == -1/(R_11*C_1)*Ω solve, R_11 → -816993.464052*Ω = -816.993 kΩ
Dk == -R_2*C_3
