R_2 := 1 kΩ
V_out := 2.5 V
V_in := 10 V
V_out == R_2/(R_2 + R_1)*V_in
R_1 := R_2/(V_out/V_in) - R_2 = 3 kΩ
R_1 := 3.9 kΩ  # Fusk lidt med værdien ift. output
V_out := R_2/(R_2 + R_1)*V_in = 2.04082 V
